OpenVSP model (file version 5), 17 components.
Geometry view with OpenVSP parameter names; values to 6 digits, angles in degrees, lengths in the model's unit.
Overall bounding box: X_Min=0 X_Len=53.5829 Y_Min=-13.9956 Y_Len=27.9911 Z_Min=-4.98571 Z_Len=15.3057

Fuselage "FUSE_OML"
  location (X Y Z) 0 0 0, rotation 0 0 0
  bounding box size 52 5.2 6.63
  Design: Length=52
  cross sections:
    n   XLocPercent  YLocPercent  ZLocPercent  shape
    0   0            0            0            point
    1   0.04         0            0            general fuselage BotStr=0.83 BotTanAngle=90 CornerRad=0.55 Height=3.575 LowStr=0.83 MaxWidthLoc=-0.15 TopStr=0.83 TopTanAngle=90 UpStr=0.83 Width=2.184
    2   0.12         0            0            general fuselage BotStr=0.83 BotTanAngle=90 CornerRad=0.4 Height=5.98 LowStr=0.83 MaxWidthLoc=-0.3 TopStr=0.83 TopTanAngle=90 UpStr=0.83 Width=4.576
    3   0.211538     0            0            general fuselage BotStr=0.83 BotTanAngle=90 CornerRad=0.32 Height=6.5 LowStr=0.83 MaxWidthLoc=-0.38 TopStr=0.83 TopTanAngle=90 UpStr=0.83 Width=5.2
    4   0.288462     0            0            general fuselage BotStr=0.83 BotTanAngle=90 CornerRad=0.22 Height=6.63 LowStr=0.83 MaxWidthLoc=-0.38 TopStr=0.83 TopTanAngle=90 UpStr=0.83 Width=5.2
    5   0.640385     0            0            general fuselage BotStr=0.83 BotTanAngle=90 CornerRad=0.32 Height=6.5 LowStr=0.83 MaxWidthLoc=-0.38 TopStr=0.83 TopTanAngle=90 UpStr=0.83 Width=5.2
    6   0.682692     0            0            as above
    7   0.721154     0            0            as above
    8   0.865385     0            0            general fuselage BotStr=0.83 BotTanAngle=90 CornerRad=0.32 Height=5.85 LowStr=0.83 MaxWidthLoc=-0.38 TopStr=0.83 TopTanAngle=90 UpStr=0.83 Width=4.68
    9   0.942308     0            0            general fuselage BotStr=0.83 BotTanAngle=90 CornerRad=0.45 Height=5.525 LowStr=0.83 MaxWidthLoc=-0.2 TopStr=0.83 TopTanAngle=90 UpStr=0.83 Width=3.9
    10  0.97         0            0            circle Circle_Diameter=2.86
    11  1            0            0            point

Wing "PLBD_L", child of "FUSE_OML"
  location (X Y Z) 15.5 -0.15 3.12, rotation 0 0 -8
  bounding box size 17.4309 4.53677 0.693022
  totals: TotalSpan=2.15 TotalProjectedSpan=2.15 TotalChord=17.3 TotalArea=37.195 TotalAR=0.124277 MAC=17.3
  root: chord 17.3, twist 0, NACA 4-series Camber=0 CamberLoc=0.2 ThickChord=0.04
  sections:
    n  Span  Root_Chord  Tip_Chord  Area    Sweep  Sweep_Location  Dihedral  Twist  Twist_Location  tip airfoil
    1  2.15  17.3        17.3       37.195  0      0               0         0      0.25            as above

Wing "PLBD_R", child of "FUSE_OML"
  location (X Y Z) 15.5 0.15 3.12, rotation 0 0 8
  bounding box size 17.4309 4.53677 0.693022
  totals: TotalSpan=2.15 TotalProjectedSpan=2.15 TotalChord=17.3 TotalArea=37.195 TotalAR=0.124277 MAC=17.3
  root: chord 17.3, twist 0, NACA 4-series Camber=0 CamberLoc=0.2 ThickChord=0.04
  sections:
    n  Span  Root_Chord  Tip_Chord  Area    Sweep  Sweep_Location  Dihedral  Twist  Twist_Location  tip airfoil
    1  2.15  17.3        17.3       37.195  0      0               0         0      0.25            as above

Wing "MAIN_WING", child of "FUSE_OML"
  location (X Y Z) 13.5 0 -2.73, rotation 0 0 0
  symmetric about XZ
  bounding box size 18.5 27.9911 2.22134
  totals: TotalSpan=28 TotalProjectedSpan=27.9828 TotalChord=8.825 TotalArea=229.068 TotalAR=3.41835 MAC=10.793
  root: chord 18.5, twist 0, NACA 4-series Camber=0 CamberLoc=0.2 ThickChord=0.12
  sections:
    n  Span  Root_Chord  Tip_Chord  Area    Sweep  Sweep_Location  Dihedral  Twist  Twist_Location  tip airfoil
    1  5.88  18.5        7.2        75.558  52     0               1         0      0.25            NACA 4-series Camber=0 CamberLoc=0.2 ThickChord=0.1
    2  8.12  7.2         2.4        38.976  28     0               2.5       0      0.25            NACA 4-series Camber=0 CamberLoc=0.2 ThickChord=0.08
  SS_Control "ELEVON": UStart=0.4 UEnd=0.6 Length_C_Start=0.22 Length_C_End=0.22 Length_Start=2.5784 Length_End=1.1616 LE_Flag=0 Surf_Type=2

Wing "VERTICAL_FIN", child of "FUSE_OML"
  location (X Y Z) 44.5 0 3.12, rotation 90 0 0
  bounding box size 9.08291 0.880462 7.2
  totals: TotalSpan=7.2 TotalProjectedSpan=7.2 TotalChord=5.3 TotalArea=38.16 TotalAR=1.35849 MAC=5.75849
  root: chord 8, twist 0, NACA 4-series Camber=0 CamberLoc=0.2 ThickChord=0.11
  sections:
    n  Span  Root_Chord  Tip_Chord  Area   Sweep  Sweep_Location  Dihedral  Twist  Twist_Location  tip airfoil
    1  7.2   8           2.6        38.16  42     0               0         0      0.25            NACA 4-series Camber=0 CamberLoc=0.2 ThickChord=0.08
  SS_Control "RUDDER_SB": UStart=0.4 UEnd=0.6 Length_C_Start=0.28 Length_C_End=0.28 Length_Start=1.9376 Length_End=1.0304 LE_Flag=0 Surf_Type=2

Wing "BODY_FLAP", child of "FUSE_OML"
  location (X Y Z) 48.5 0 -3.38, rotation 0 0 0
  symmetric about XZ
  bounding box size 2.2 4.8 0.176212
  totals: TotalSpan=4.8 TotalProjectedSpan=4.8 TotalChord=2.1 TotalArea=10.08 TotalAR=2.28571 MAC=2.10159
  root: chord 2.2, twist 0, NACA 4-series Camber=0 CamberLoc=0.2 ThickChord=0.08
  sections:
    n  Span  Root_Chord  Tip_Chord  Area  Sweep  Sweep_Location  Dihedral  Twist  Twist_Location  tip airfoil
    1  2.4   2.2         2          5.04  0      0               0         0      0.25            as above

Pod "OMS_POD_L", child of "FUSE_OML"
  location (X Y Z) 43 -2.6 0.975, rotation 0 0 0
  bounding box size 6.5 2.88889 2.88889
  Design: FineRatio=4.5 Length=6.5

Pod "OMS_POD_R", child of "FUSE_OML"
  location (X Y Z) 43 2.6 0.975, rotation 0 0 0
  bounding box size 6.5 2.88889 2.88889
  Design: FineRatio=4.5 Length=6.5

Pod "NOSE_GEAR", child of "FUSE_OML"
  location (X Y Z) 8.5 0 -4.2, rotation 90 0 0
  bounding box size 2.8 0.7 0.7
  Design: FineRatio=8 Length=2.8

Pod "MAIN_GEAR_L", child of "FUSE_OML"
  location (X Y Z) 30 -3.2 -4.5, rotation 90 0 0
  bounding box size 3.4 0.971429 0.971429
  Design: FineRatio=7 Length=3.4

Pod "MAIN_GEAR_R", child of "FUSE_OML"
  location (X Y Z) 30 3.2 -4.5, rotation 90 0 0
  bounding box size 3.4 0.971429 0.971429
  Design: FineRatio=7 Length=3.4

Pod "CREW_HATCH", child of "FUSE_OML"
  location (X Y Z) 6.5 -2.7 0.2, rotation 0 0 0
  bounding box size 1.6 0.914286 0.914286
  Design: FineRatio=3.5 Length=1.6

Pod "AIRLOCK_BH_FWD", child of "FUSE_OML"
  location (X Y Z) 11 0 0, rotation 0 90 0
  bounding box size 0.583333 0.583333 0.35
  Design: FineRatio=1.2 Length=0.35

Pod "AIRLOCK_BH_AFT", child of "FUSE_OML"
  location (X Y Z) 15 0 0, rotation 0 90 0
  bounding box size 0.583333 0.583333 0.35
  Design: FineRatio=1.2 Length=0.35

Pod "ENGINE_NACELLE", child of "FUSE_OML"
  location (X Y Z) 48.9 0 -0.4, rotation 0 0 0
  bounding box size 3.2 2.28571 2.28571
  Design: FineRatio=2.8 Length=3.2

Pod "INLET_L", child of "FUSE_OML"
  location (X Y Z) 34 -2.4 -1.8, rotation 0 0 0
  bounding box size 3 1.2 1.2
  Design: FineRatio=5 Length=3

Pod "INLET_R", child of "FUSE_OML"
  location (X Y Z) 34 2.4 -1.8, rotation 0 0 0
  bounding box size 3 1.2 1.2
  Design: FineRatio=5 Length=3
